# Ідеальний тренд
n := 10000
f(t) := 0.0000005*t^2
x := 0, 1 .. n
# [plot: f(x) vs x]
# Ідеальна модель + шум
mu := 0
sigma := 5
noise := rnorm(n + 1, mu, sigma)
model_fn :=
    for i ∈ 0, 1 .. n
        r[i] ← f(i) + noise[i]
        r
# [plot: model_fn[x] vs x]
# Модель + аномальні виміри
abnorm_coeff := 3
abnorm_dens := 10
abnorm_count := (n*abnorm_dens)/100
abnorm_pos :=
    for i ∈ 0, 1 .. abnorm_count
        r[i] ← ceil(rnd(n))
        r
abnormals := rnorm(abnorm_count + 1, mu, sigma*abnorm_coeff)
model_fna :=
    r ← model_fn
    for i ∈ 0, 1 .. abnorm_count
        j ← abnorm_pos[i]
        r[j] ← abnormals[i] + r[j]
        r
# [plot: model_fna[x], model_fn[x], f(x) vs x]
# Згладжування методом найменших квадратів
Y :=
    for i ∈ 0, 1 .. n
        y[i, 0] ← model_fna[i]
        y
F :=
    for i ∈ 0, 1 .. n
        f[i, 0] ← 1
        f[i, 1] ← i
        f[i, 2] ← i^2
        f[i, 3] ← i^3
        f
C := (transpose(F)*F)^-1*transpose(F)*Y = [0.0735749; 1.05568e-5; 4.86322e-7; 1.04546e-12]
interpolated(x) := C[0] + x*C[1] + x^2*C[2] + x^3*C[3]
# [plot: model_fna[x], model_fn[x], interpolated(x) vs x]
vLSM :=
    for i ∈ 0, 1 .. n
        r[i] ← interpolated(i)
        r
# Розширення МНК експонентом
polinom(t, c0, c1, c2, c3) := c0 + c1*t + c2*t^2 + c3*t^3
p_t(t, c0, c1, c2, c3) := polinom(t, c0, c1, c2, c3) series, t → c0 + c1*t + c2*t^2 + c3*t^3
X := p_t(t, c0, c1, c2, c3) coeffs, t → [c0; c1; c2; c3]
exponent(t, a0, a1, a2, a3) := a0 + a1*t + a2*e^(a3*t)
e_t(t, a0, a1, a2, a3) := exponent(t, a0, a1, a2, a3) series, t, 4 → a2 + a0 + (a2*a3 + a1)*t + a2*a3^2/2*t^2 + a2*a3^3/6*t^3
Y := e_t(t, a0, a1, a2, a3) coeffs, t → [a2 + a0; a2*a3 + a1; a2*a3^2/2; a2*a3^3/6]
E := X - Y → [c0 - (a2 + a0); c1 - (a2*a3 + a1); -a2*a3^2/2 + c2; -a2*a3^3/6 + c3]
E := E solve, a0, a1, a2, a3, simplify → [c0 - 2*c2^3/(9*c3^2), c1 - 2*c2^2/(3*c3), 2*c2^3/(9*c3^2), 3*c3/c2]
A := transpose(E) substitute, c0 == C[0], c1 == C[1], c2 == C[2], c3 == C[3] → [-25.0213766431; -0.00291745040406; 24.4352756804; 0.000153121278838]
rnd_exp(c0, c1, c2, c3) := [c0 - 2*c2^3/(9*c3^2); c1 - 2*c2^2/(3*c3); 2*c2^3/(9*c3^2); 3*c3/c2]
exponent_int(t) := exponent(t, A[0], A[1], A[2], A[3])
# [plot: model_fna[x], model_fn[x], exponent_int(x) vs x]
vExp :=
    for i ∈ 0, 1 .. n
        r[i] ← exponent_int(i)
        r
# Ітеративна експонента
fe(t, u) := [u[0] + u[1]*t + u[2]*e^(u[3]*t); 1; t; exp(u[3]*t); u[2]*t*exp(u[3]*t)]
A = [-23385.1; -0.150805; 23385.2; 6.44921e-6]
vFna :=
    for i ∈ 0, 1 .. n
        r[i] ← model_fna[i]
        r
vX :=
    for i ∈ 0, 1 .. n
        r[i] ← i
        r
guess := [-2000; 0.001; 2000; 0.000001]
vF :=
    for i ∈ 0, 1 .. n
        r[i] ← f(i)
        r
vC := genfit(vX, vFna, guess, fe) = [-23518.8; -0.151198; 23518.9; 6.42929e-6]
# [plot: model_fna[x], model_fn[x], fe(x, vC)[0] vs x]
vIter :=
    for i ∈ 0, 1 .. n
        r[i] ← fe(i, vC)[0]
        r
# СКВ та Лінійне відхилення
f_a := max(vF) - min(vF) = 50
lsm_a := max(vLSM) - min(vLSM) = 51.5076
exp_a := max(vExp) - min(vExp) = 59.3736
iter_a := max(vIter) - min(vIter) = 51.4699
mse(vx, vy) :=
    for i ∈ 0, 1 .. n
        r ← r + (vx[i] - vy[i])^2
        r
    r ← r/n
    r
mle(vx, vy) :=
    for i ∈ 0, 1 .. n
        r ← r + |vx[i] - vy[i]|
        r
    r ← r/n
    r
mse_a(vf, average) :=
    for i ∈ 0, 1 .. n
        r ← r + (vf[i] - average)^2
        r
    r ← sqrt(r/n)
    r
mse_a(vF, f_a) = 36.5165
mse_a(vLSM, lsm_a) = 37.8424
mle(vF, vLSM) = 0.101734
mle(vF, vF) = 0
mse_a(vExp, exp_a) = 44.4894
mle(vF, vExp) = 0.0983493
mse_a(vIter, iter_a) = 37.8078
mle(vF, vIter) = 0.10178
