# Завантаження інформації про курс долара. Відхилення в даних достатньо велике. Також декларація функції для витаскування частини інформації.
usd_data := READEXCEL(".\usd_2023-2024.xlsx", "USD!G2:G162")
stdev(usd_data) = 0.794889
data(x) := usd_data[x]
# Декларації розмірів та іншої допоміжної інформації. Розбиття на три сегменти, які будуть відповідати трьом гармонікам.
l := 0 .. 160
h_c := 3
len := length(usd_data) = 161
part := ceil(len/h_c) = 54
a := 0 .. part - 1
dataa[a] := data(a)
b := part .. 2*part - 1
datab[b] := data(b)
c := 2*part .. len - 1
datac[c] := data(c)
# [plot: data(l) vs l]
# Попередня спроба описати гармоніки через циклічні процеси, використовуючи зсунуті синуси, адаптовані залежно від кількості гармонік.
pos(x) :=
    if x > 0
        if x > 1
            1
        else
            x
    else
        0
pre_harmonic_a(x) := pos(sin(h_c*x/len + π/2))^h_c
pre_harmonic_b(x) := pos(sin(h_c*x/len))^h_c
pre_harmonic_c(x) := pos(sin(h_c*x/len - π/2))^h_c
# [plot: pre_harmonic_a(l), pre_harmonic_b(l), pre_harmonic_c(l) vs l]
# Виведення алгоритмів для МНК, які використовуються для визначення хаотичних частин для кожного гармоніку.
Yr(raw, p) :=
    t ← 0
    Y ←
        for i ∈ p
            y[t, 0] ← raw[i]
            t ← t + 1
            y
Fr(p, r) :=
    t ← 0
    F ←
        for i ∈ p
            f[t, 0] ← 1
            for j ∈ 1 .. r
                f[t, j] ← i^j
            t ← t + 1
            f
lsq(F, Y) := (transpose(F)*F)^-1*transpose(F)*Y
# Визначення моделей для МНК з різною кількістю показників.
lsq_model2(coeffs, x) := coeffs[0] + coeffs[1]*x + coeffs[2]*x^2
lsq_model3(coeffs, x) := coeffs[0] + coeffs[1]*x + coeffs[2]*x^2 + coeffs[3]*x^3
lsq_model4(coeffs, x) := coeffs[0] + coeffs[1]*x + coeffs[2]*x^2 + coeffs[3]*x^3 + coeffs[4]*x^4
lsq_model5(coeffs, x) := coeffs[0] + coeffs[1]*x + coeffs[2]*x^2 + coeffs[3]*x^3 + coeffs[4]*x^4 + coeffs[5]*x^5
# Визначення коефіцієнтів для поліноміальних хаотиків кожної частини гармонії. (Це треба автоматизувати пізніше)
coeffs_a := lsq(Fr(a, 4), Yr(dataa, a)) = [36.5935; -0.0126451; 0.000998309; -4.4193e-5; 5.04187e-7]
coeffs_b := lsq(Fr(b, 3), Yr(datab, b)) = [47.6387; -0.54712; 0.00818066; -3.6655e-5]
coeffs_c := lsq(Fr(c, 5), Yr(datac, c)) = [-5354.76; 205.378; -3.10938; 0.0233881; -8.73965e-5; 1.29806e-7]
# Хаотики (Ступінь кожного поліному можна динамічно обирати)
chaotic_a(x) := lsq_model4(coeffs_a, x)
chaotic_b(x) := lsq_model3(coeffs_b, x)
chaotic_c(x) := lsq_model5(coeffs_c, x)
# [plot: data(a), lsq_model4(coeffs_a, a) vs a]
# [plot: data(b), lsq_model3(coeffs_b, b) vs b]
# [plot: data(c), lsq_model5(coeffs_c, c) vs c]
# Спроба використати циклічні гармонії.
pre_harmony(x) := sum([pre_harmonic_a(x)*chaotic_a(x); pre_harmonic_b(x)*chaotic_b(x); pre_harmonic_c(x)*chaotic_c(x)])
# [plot: data(l), pre_harmony(l) vs l]
# Нажаль такий підхід абослютно неадекватиний і в мене ніяк не вдалося чисто апріорно вивести параметри для циклічних гармонік, щоб вони нормально синхронізувалися. Тому цю ідею довелось відкинути, але в мене з'явилась ще одна. Кожна гармоніка відповідає трендам у відповідній частині часового ряду, а тому є зони, в яких розбіг є дуже невеликим, а потім вони розходяться. Ми можемо використати цей розбіг як базу для гармоніку.
# Пробуємо цей підхід на сегменті а. Використаємо стандартне відхилення сегменту як коефіцієнт для згладжування, а також оберемо коефіцієнт обрізання росходження. Його можна змінювати для досягнення певних результатів.
buffa[l] := |data(l) - chaotic_a(l)|*stdev(dataa)
cutoff := 0.25
filter_reverse(x, p) :=
    for i ∈ p
        if x[i] < cutoff
            res[i] ← 1 - x[i]
        else
            res[i] ← 0
harmonic_base_a[l] := filter_reverse(buffa, l)
# [plot: harmonic_base_a(l) vs l]
infl_a := sum(harmonic_base_a) = 71.6134
# Ці значення можна використовувати як коефіцієнти при гармонизації. Для цілей подальшого визначення гармоніків нормалізуємо ці значення.
normalize(x, p) :=
    for i ∈ p
        if x[i] == 0
            res[i] ← 0
        else
            res[i] ← 1
harmonic_norm_a[l] := normalize(harmonic_base_a, l)
# [plot: harmonic_norm_a(l) vs l]
# Повторюємо ці дії для інших гармонік.
bb := Yr(datab, b)
cc := Yr(datac, c)
buffb[l] := |data(l) - chaotic_b(l)|*stdev(bb)
harmonic_base_b[l] := filter_reverse(buffb, l)
infl_b := sum(harmonic_base_b) = 69.6508
# [plot: harmonic_base_b(l) vs l]
harmonic_norm_b[l] := normalize(harmonic_base_b, l)
buffc[l] := |data(l) - chaotic_c(l)|*stdev(cc)
harmonic_base_c[l] := filter_reverse(buffc, l)
infl_c := sum(harmonic_base_c) = 53.2156
harmonic_norm_c[l] := normalize(harmonic_base_c, l)
# [plot: harmonic_base_c(l) vs l]
# Реконструюємо гармоніки та гармонізуємо загальну модель.
harmonic_a(x) := harmonic_norm_a[x]*chaotic_a(x)
harmonic_b(x) := harmonic_norm_b[x]*chaotic_b(x)
harmonic_c(x) := harmonic_norm_c[x]*chaotic_c(x)
lv := l = [
    0; 1; 2; 3; 4; 5; 6; 7; 8; 9
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]
harmonics(x, i) := [harmonic_a(x); harmonic_b(x); harmonic_c(x)][i]
harmonize(x, p, r) :=
    for i ∈ p
        res[i] ← 0
        for j ∈ 0 .. r - 1
            if res[i] ≠ 0
                if x(i, j) ≠ 0
                    res[i] ← x(i, j)/2 + res[i]/2
                else
                    res[i] ← res[i]
            else
                if x(i, j) ≠ 0
                    res[i] ← x(i, j)
                else
                    res[i] ← 0
            res
harmony := harmonize(harmonics, l, 3)
# Тут для балансування між значеннями різних гармонік використано просте усереднення значення, але можливо створити більш розумний балансер, який буде приймати до уваги відхилення кожного гармоніку в конкретній точці та вводити відповідні коефіцієнти для кожного з них.
#
# Для порівняння з чимось отриманого результату візьмемо вбудоване в маткад адаптивне квадратичне згладжування.
smoothed := supsmooth(lv, usd_data)
stderr(smoothed, usd_data) = 0.103457
stderr(harmony, usd_data) = 0.145307
# Відставання виміряється в 40 тисячних, і це непоганий результат для першої спроби, але ще є простір для покращення. Окрім позначенного вище, можна банально збільшити кількість гармонік і тим самим можливо покращити адекватність результату. Також збільшення кількості гармонік дозволить використовувати полиноми меншого порядку, що значно простіше для прогностики. Отже потрібні додаткові експеременти.
# Графіки для отриманих результатів.
# [plot: usd_data[l], harmony[l], smoothed[l] vs l]
# [plot: harmonic_base_a[l], harmonic_base_b[l], harmonic_base_c[l] vs l]
