# Декларації з попереднього файлу та глобальні змінні.
usd_data := READEXCEL(".\usd_2023-2024.xlsx", "USD!G2:G162")
data(x) := usd_data[x]
len := length(usd_data) = 161
l := 0 .. 160
h_c := 7
h_r := 2
cutoff := 0.05
lsq_model := lsq_model2
Yr(raw, p) :=
    t ← 0
    Y ←
        for i ∈ p
            y[t, 0] ← raw[i]
            t ← t + 1
            y
Fr(p, r) :=
    t ← 0
    F ←
        for i ∈ p
            f[t, 0] ← 1
            for j ∈ 1 .. r
                f[t, j] ← i^j
            t ← t + 1
            f
lsq(F, Y) := (transpose(F)*F)^-1*transpose(F)*Y
lsq_model2(coeffs, x) ≡ coeffs[0] + coeffs[1]*x + coeffs[2]*x^2
lsq_model3(coeffs, x) ≡ coeffs[0] + coeffs[1]*x + coeffs[2]*x^2 + coeffs[3]*x^3
lsq_model4(coeffs, x) ≡ coeffs[0] + coeffs[1]*x + coeffs[2]*x^2 + coeffs[3]*x^3 + coeffs[4]*x^4
harmonize(x, p, r) :=
    t ← 0
    for i ∈ p
        res[t] ← 0
        for j ∈ 0 .. r - 1
            if res[t] ≠ 0
                if x(i, j) ≠ 0
                    res[t] ← x(i, j)/2 + res[t]/2
                else
                    res[t] ← res[t]
            else
                if x(i, j) ≠ 0
                    res[t] ← x(i, j)
                else
                    res[t] ← res[t - 1]
            res
        t ← t + 1
        res
filter_reverse(x) :=
    for i ∈ 0 .. length(x) - 1
        if x[i] < cutoff
            res[i] ← 1 - x[i]
        else
            res[i] ← 0
        res
normalize(x) :=
    for i ∈ 0 .. length(x) - 1
        if x[i] == 0
            res[i] ← 0
        else
            res[i] ← 1
        res
# Треба автоматизувати сегментацію залежно від кількості гармонік.
segment(p, r) :=
    part ← ceil(p/h_c)
    for i ∈ 0 .. r - 1
        if i == r - 1
            res[i] ← part*i .. p - 1
        else
            res[i] ← part*i .. part*(i + 1) - 1
        res
segs := segment(len, h_c) = [
    [0; 1; 2; 3; 4; 5; 6; 7; 8; 9; 10; 11; 12; 13; 14; 15; 16; 17; 18; 19; 20; 21; 22];
    [23; 24; 25; 26; 27; 28; 29; 30; 31; 32; 33; 34; 35; 36; 37; 38; 39; 40; 41; 42; 43; 44; 45];
    [46; 47; 48; 49; 50; 51; 52; 53; 54; 55; 56; 57; 58; 59; 60; 61; 62; 63; 64; 65; 66; 67; 68];
    [69; 70; 71; 72; 73; 74; 75; 76; 77; 78; 79; 80; 81; 82; 83; 84; 85; 86; 87; 88; 89; 90; 91];
    [92; 93; 94; 95; 96; 97; 98; 99; 100; 101; 102; 103; 104; 105; 106; 107; 108; 109; 110; 111; 112; 113; 114];
    [115; 116; 117; 118; 119; 120; 121; 122; 123; 124; 125; 126; 127; 128; 129; 130; 131; 132; 133; 134; 135; 136; 137];
    [138; 139; 140; 141; 142; 143; 144; 145; 146; 147; 148; 149; 150; 151; 152; 153; 154; 155; 156; 157; 158; 159; 160]
]
# Використаємо хаотики визначеного порядку та порахуємо коефіцієнти для кожного з них залежно від сегменту. Також на майбутнє витаскуємо дані.
datar(se) :=
    for i ∈ 0 .. length(se) - 1
        next ← se[i]
        for j ∈ 0 .. length(next) - 1
            res[i, j] ← data(next[j])
            res
dati := datar(segs)
lsqr(se, r) :=
    for i ∈ 0 .. length(se) - 1
        res[i] ← lsq(Fr(se[i], r), Yr(usd_data, se[i]))
        res
coeffs := lsqr(segs, h_r)
# Формуємо хаотіки на основі отриманих коефіцієнтів.
chaos(x, co) :=
    for i ∈ 0 .. length(co) - 1
        res[i] ← lsq_model(co[i], x)
        res
chaotics(x) := chaos(x, coeffs)
# Отримані хаотіки.
# [plot: chaotics(l)[0], chaotics(l)[1], chaotics(l)[2], chaotics(l)[3], chaotics(l)[4], chaotics(l)[5], chaotics(l)[6], data(l) vs l]
# Виводимо гармоніки.
harmonyr(ch, da) :=
    for i ∈ 0 .. length(ch(0)) - 1
        for j ∈ 0 .. len - 1
            buff[j] ← |usd_data[j] - ch(j)[i]|*stdev(transpose(da[i, :]))
        res[i] ← filter_reverse(buff)
        res
harmonics_base := harmonyr(chaotics, dati)
# Покриття отриманих ганмонік.
# [plot: harmonics_base[0][l], harmonics_base[1][l], harmonics_base[2][l], harmonics_base[3][l], harmonics_base[4][l], harmonics_base[5][l], harmonics_base[6][l] vs l]
# Нормалізуємо отримані гармоніки.
normalizer(ha) :=
    for i ∈ 0 .. length(ha) - 1
        res[i] ← normalize(ha[i])
        res
harmonics_norm := normalizer(harmonics_base)
# Формулюємо гармонію.
harmonics(x, i) := harmonics_norm[i][x]*chaotics(x)[i]
lv := l = [
    0; 1; 2; 3; 4; 5; 6; 7; 8; 9
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]
harmony := harmonize(harmonics, l, h_c)
smoothed := supsmooth(lv, usd_data)
# [plot: data(l), harmony[l], smoothed[l] vs l]
stderr(smoothed, usd_data) = 0.103457
stderr(harmony, usd_data) = 0.104925
# Отримане розходження із адаптивним згладжуванням в 2 тисячних, що є дуже хорошим результатом, якщо прийняти до уваги, що ми використовуємо прості поліноми, які всі одного порядку. Якщо додати більше балансування, можливість адаптивно змінювати порядки, вплив, рівень відсічі та інші параметри, то можна досягти і кращого результату, але це вже буде можливо якщо робити програмний застосунок, а не в маткаді, оскільки там є більший контроль над тим, що відбувається.
# Візьмемо цю точність як задовільну, і тепер можемо перейти до того, власне навіщо ми створювали подібну модель. Набір хаотік - це по суті набір кривих, які були адаптовані до різних ділянок формул, тобто апріорно вони несуть певну інформацію про оригінальний тренд. За межами сегменту регресії звісно вони будуть росходитись, але все одно ці криві відповідають динаміці, яку ми можемо використати. Якщо їх екстраполювати за межі часового ряду, і інтерполюючи між ними, то ми можемо отримати припущення, яке математично закодоване на певні якості оригінального тренду.
# Не всі гармоніки рівні, оскільки деякі можуть відображати абнормалії або моментальні пориви, які були характерні тільки до певного моменту. Але вище ми маємо графіки покриття гармонік, які відповідають простору, в якому вони близько адекватні початковим даним. Ми можемо аналізувати цей графік, щоб визначити вплив кожної з гармонік.
# Ми можемо представити покриття у формі площі графіку, яку обчислимо.
harmonics_cov :=
    for i ∈ 0 .. h_c - 1
        res[i] ← sum(harmonics_base[i])
        res
    = [28.7097; 27.66; 31.309; 27.3874; 40.3128; 30.2983; 31.2628]
harmony_cov := sum(harmonics_cov) = 216.94
ideal_cov := integral(1, x = 0 .. len - 1) = 160
# Ми маємо більше покриття гармонією ніж ідеальне через те, що деякі гармоніки перективають один одного. Саме це і потрібно з'ясувати, впливовість кожного з них. Зробимо це через нормаль.
harmonics_cov_x := harmonics_cov/ideal_cov = [0.179436; 0.172875; 0.195681; 0.171171; 0.251955; 0.189364; 0.195393]
d_cutoff := max(harmonics_cov_x)/2
dominants_cov :=
    t ← 0
    for i ∈ 0 .. h_c - 1
        if harmonics_cov_x[i] > d_cutoff
            res[t, 0] ← i
            res[t, 1] ← harmonics_cov_x[i]
            t ← t + 1
        res
    = [0, 0.179436; 1, 0.172875; 2, 0.195681; 3, 0.171171; 4, 0.251955; 5, 0.189364; 6, 0.195393]
dominant_coeffs :=
    t ← 0
    for i ∈ dominants_cov[:, 0]
        res[t] ← coeffs[i]
        t ← t + 1
        res
d_chaotics(x) := chaos(x, dominant_coeffs)
# [plot: data(l), d_chaotics(l)[0], d_chaotics(l)[1], d_chaotics(l)[2], d_chaotics(l)[3], d_chaotics(l)[4], d_chaotics(l)[5], d_chaotics(l)[6] vs l]
# Тут можна побачити що тут всі гармоніки потрапили в домінанти, це тому що часовий ряд відносно невеликий і ми не можемо виділити щось конкретне. Тому нам потрібно приймати до уваги релевантність домінант, зважаючи чим ближчі вони до теперішнього часу, тим більше вони відображають дійсність.
pre_dominants_base := harmonyr(d_chaotics, dati)
dominants_base :=
    for i ∈ 0 .. length(pre_dominants_base) - 1
        next ← pre_dominants_base[i]
        for j ∈ 0 .. len - 1
            resa[j] ← next[j]*(j/len)^2
            resa
        resb[i] ← resa
        resb
    = [
        [
            0; 3.84274e-5; 0.000154302; 0.000345654; 0.000613071; 0.000955969; 0.00137921; 0.00187978; 0.00246311; 0.00311557
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        ];
        [
            0; 0; 0; 0; 0; 0; 0; 0; 0; 0
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        ];
        [
            0; 0; 0; 0; 0; 0; 0; 0; 0; 0
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        ];
        [
            0; 0; 0; 0; 0; 0; 0; 0; 0; 0
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        ];
        [
            0; 0; 0; 0; 0; 0; 0; 0; 0; 0
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        ];
        [
            0; 0; 0; 0; 0; 0; 0; 0; 0; 0
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        ];
        [
            0; 0; 0; 0; 0; 0; 0; 0; 0; 0
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        ]
    ]
# [plot: dominants_base[0][l], dominants_base[1][l], dominants_base[2][l], dominants_base[3][l], dominants_base[4][l], dominants_base[5][l], dominants_base[6][l] vs l]
dominants_cov_r :=
    for i ∈ 0 .. length(dominants_base) - 1
        res[i] ← sum(dominants_base[i])/ideal_cov
        res
# Це все ми могли би робити і на етапі формування домінант. Відкидуємо непотрібні.
dominants_r :=
    t ← 0
    for i ∈ 0 .. length(dominants_base) - 1
        if dominants_cov_r[i] > d_cutoff/4
            res[t, 0] ← dominants_cov[i, 0]
            res[t, 1] ← dominants_cov_r[i]
            t ← t + 1
        res
    = [3, 0.0361872; 4, 0.0849373; 5, 0.123675; 6, 0.154426]
dominant_coeffs_r :=
    t ← 0
    for i ∈ dominants_r[:, 0]
        res[t] ← coeffs[i]
        t ← t + 1
        res
dominant_chaotics(x, i) := chaos(x, dominant_coeffs_r)[i]
dominant_harmony := harmonize(dominant_chaotics, l, length(dominant_coeffs_r))
# [plot: data(l), dominant_chaotics(l, 0), dominant_chaotics(l, 1), dominant_chaotics(l, 2), dominant_chaotics(l, 3), dominant_harmony[l] vs l]
ext := ceil(3*len/4) .. len - 1 + 20
# Спробуємо екстраполювати та побудувати тренд.
extd := ceil(3*len/4) .. len - 1
dominant_harmony_e := harmonize(dominant_chaotics, ext, length(dominant_coeffs_r))
shift(i) := dominant_harmony_e[i - ceil(3*len/4)]
# [plot: data(extd), shift(ext) vs extd, ext]
