usd_data := READEXCEL(".\data\usd_2023-2024_1.xlsx", "USD!G2:G162")
l := 0 .. length(usd_data) - 1
n := 0 .. 5
length(usd_data) = 161
# [plot: usd_data[l] vs l]
usd_data_m := median(usd_data) = 37.4521
usd_data_d := var(usd_data) = 0.631848
usd_data_scv := sqrt(usd_data_d) = 0.794889
Y :=
    for i ∈ l
        y[i, 0] ← usd_data[i]
        y
F :=
    for i ∈ l
        for j ∈ n
            f[i, j] ← i^j
            f
        f
C := (transpose(F)*F)^-1*transpose(F)*Y = [36.6671; -0.0023396; -0.00136827; 4.05778e-5; -3.52193e-7; 9.72669e-10]
lsm(t) := C[0] + C[1]*t + C[2]*t^2 + C[3]*t^3 + C[4]*t^4 + C[5]*t^5
# [plot: usd_data[l], lsm(l) vs l]
lsm_v[l] := lsm(l)
lsm_m := median(lsm_v) = 37.2602
lsm_d := var(lsm_v) = 0.561493
lsv_scv := sqrt(lsm_d) = 0.749328
lsm_cov := cvar(usd_data, lsm_v) = 0.561493
lsm_concord := 2*lsm_cov/(usd_data_d + lsm_d + (usd_data_m - lsm_m)^2) = 0.912883
polinom(t, c0, c1, c2, c3, c4, c5) := c0 + c1*t + c2*t^2 + c3*t^3 + c4*t^4 + c5*t^5
X := polinom(t, c0, c1, c2, c3, c4, c5) coeffs, t → [c0; c1; c2; c3; c4; c5]
model(t, a0, a1, a2, a3, a4, a5) := a0 + a1*t + a2*sin(a3*t) + a4*cos(a5*t)
model_t := model(t, a0, a1, a2, a3, a4, a5) series, t → a4 + a0 + (a2*a3 + a1)*t - a4*a5^2/2*t^2 - a2*a3^3/6*t^3 + a4*a5^4/24*t^4 + a2*a3^5/120*t^5
model_r := model(t, 0, 1, 1, 1, 1, 1) series, t → 1 + 2*t - 1/2*t^2 - 1/6*t^3 + 1/24*t^4 + 1/120*t^5
k := model_r coeffs → [1; 2; -1/2; -1/6; 1/24; 1/120]
K := model_t coeffs, t → [a4 + a0; a2*a3 + a1; -(a4*a5^2)/2; -(a2*a3^3)/6; a4*a5^4/24; a2*a3^5/120]
Y := K/k → [a4 + a0; (a2*a3 + a1)/2; a4*a5^2; a2*a3^3; a4*a5^4; a2*a3^5]
E := X - Y simplify → [c0 - (a4 + a0); c1 - (a2*a3/2 + a1/2); c2 - a4*a5^2; c3 - a2*a3^3; c4 - a4*a5^4; c5 - a2*a3^5]
Ex := E solve, a0, a1, a2, a3, a4, a5 → [
    (c0*c4 - c2^2)/c4, (2*c1*c5 - c3^2)/c5, -(c3^3*sqrt(c5/c3))/c5^2, -sqrt(c5/c3), c2^2/c4, -sqrt(c4/c2);
    (c0*c4 - c2^2)/c4, (2*c1*c5 - c3^2)/c5, c3^3*sqrt(c5/c3)/c5^2, sqrt(c5/c3), c2^2/c4, -sqrt(c4/c2);
    (c0*c4 - c2^2)/c4, (2*c1*c5 - c3^2)/c5, -(c3^3*sqrt(c5/c3))/c5^2, -sqrt(c5/c3), c2^2/c4, sqrt(c4/c2);
    (c0*c4 - c2^2)/c4, (2*c1*c5 - c3^2)/c5, c3^3*sqrt(c5/c3)/c5^2, sqrt(c5/c3), c2^2/c4, sqrt(c4/c2)
]
Ea := transpose(Ex[0, :]) → [
    (c0*c4 - c2^2)/c4;
    (2*c1*c5 - c3^2)/c5;
    -(c3^3*sqrt(c5/c3))/c5^2;
    -sqrt(c5/c3);
    c2^2/c4;
    -sqrt(c4/c2)
]
A := Ea substitute, c0 == C[0], c1 == C[1], c2 == C[2], c3 == C[3], c4 == C[4], c5 == C[5] → [41.9827606615; -1.69750307923; -345.758956717; -0.00489596537588; -5.31569742638; -0.0160437225985]
model_x(t) := model(t, A[0], A[1], A[2], A[3], A[4], A[5])
# [plot: usd_data[l], lsm(l), model_x(l) vs l]
iter(t, u) := model(t, u[0], u[1], u[2], u[3], u[4], u[5]) → u[2]*sin(t*u[3]) + u[4]*cos(t*u[5]) + t*u[1] + u[0]
iter_d0(t, u) := ∂/∂a0(model(t, a0, a1, a2, a3, a4, a5)) → 1
iter_d1(t, u) := ∂/∂a1(model(t, a0, a1, a2, a3, a4, a5)) → t
iter_d2(t, u) := ∂/∂a2(model(t, a0, a1, a2, a3, a4, a5)) → sin(a3*t) substitute, a3 == u[3] → sin(t*u[3])
iter_d3(t, u) := ∂/∂a3(model(t, a0, a1, a2, a3, a4, a5)) → a2*t*cos(a3*t) substitute, a3 == u[3], a2 == u[2] → t*u[2]*cos(t*u[3])
iter_d4(t, u) := ∂/∂a4(model(t, a0, a1, a2, a3, a4, a5)) → cos(a5*t) substitute, a5 == u[5] → cos(t*u[5])
iter_d5(t, u) := ∂/∂a5(model(t, a0, a1, a2, a3, a4, a5)) → -(a4*t*sin(a5*t)) substitute, a4 == u[4], a5 == u[5] → -(t*u[4]*sin(t*u[5]))
fe(t, u) := [
    iter(t, u);
    iter_d0(t, u);
    iter_d1(t, u);
    iter_d2(t, u);
    iter_d3(t, u);
    iter_d4(t, u);
    iter_d5(t, u)
] → [
    u[2]*sin(t*u[3]) + u[4]*cos(t*u[5]) + t*u[1] + u[0];
    1;
    t;
    sin(t*u[3]);
    t*u[2]*cos(t*u[3]);
    cos(t*u[5]);
    -(t*u[4]*sin(t*u[5]))
]
vFna :=
    for i ∈ l
        r[i] ← usd_data[i]
        r
vX :=
    for i ∈ l
        r[i] ← i
        r
guess := A
vC := genfit(vX, vFna, guess, fe) = [532662; -0.331067; -16.0963; -0.0159394; -532625; -8.14647e-5]
fitted[l] := fe(l, vC)[0]
fitted_m := median(fitted) = 37.2677
fitted_d := var(fitted) = 0.547431
fitted_scv := sqrt(fitted_d) = 0.739886
fitted_cov := cvar(usd_data, fitted) = 0.547431
fitted_concord := 2*fitted_cov/(usd_data_d + fitted_d + (usd_data_m - fitted_m)^2) = 0.902405
# [plot: usd_data[l], fitted[l] vs l]
usd_new := READEXCEL(".\data\usd_2023-2024_2.xlsx", "USD!G2:G180")
r := 0 .. length(usd_new) - 1
length(usd_new) = 179
usd_new_m := median(usd_new) = 37.5698
usd_new_d := var(usd_new) = 0.842787
usd_new_scv := sqrt(usd_new_d) = 0.918034
extra[r] := fe(r, vC)[0]
poly[r] := lsm(r)
extra_m := median(extra) = 37.4886
poly_m := median(poly) = 37.561
extra_d := var(extra) = 0.670336
poly_d := var(poly) = 1.36787
extra_scv := sqrt(extra_d) = 0.818741
poly_scv := sqrt(poly_d) = 1.16956
extra_cov := cvar(usd_new, extra) = 0.712639
poly_cov := cvar(usd_new, poly) = 0.979259
extra_concord := 2*extra_cov/(usd_new_d + extra_d + (usd_new_m - extra_m)^2) = 0.937857
poly_concord := 2*poly_cov/(usd_new_d + poly_d + (usd_new_m - poly_m)^2) = 0.885912
# [plot: usd_new[r], extra[r], poly[r] vs r]
extra_diff[r] := |usd_new[r] - extra[r]|
extra_err := sum(extra_diff) = 45.6525
poly_diff[r] := |usd_new[r] - poly[r]|
poly_err := sum(poly_diff) = 55.6443
max(extra_diff) = 0.592785
max(poly_diff) = 2.77379
# [plot: poly_diff[r], extra_diff[r], max(poly_diff), max(extra_diff) vs r]
# Transcendental DSB testing
d := 450
nn := 0 .. d
mu := 0
sigma := 0.5
add := rnorm(d + 1, mu, sigma)
noise(a, b) :=
    for i ∈ 0 .. length(a) - 1
        a[i] ← a[i] + b[i]
        a
concord(a, b) := |2*cvar(a, b)/(var(a) + var(b) + (median(a) - median(b))^2)|
apply(a, r) :=
    for i ∈ 0 .. length(a) - 1
        if r[i] == 0
            res[i] ← 0
        else
            res[i] ← a[i]/r[i]
        res
lin_div(a, b) :=
    for i ∈ 0 .. length(a) - 1
        res ← res + |a[i] - b[i]|
        res
m_tt(t) := 0.5*sin(0.01*t) + 2*cos(0.01*t)
m_ttf[nn] := m_tt(nn)
m_ttn := noise(m_ttf, add)
# [plot: m_ttn[nn], m_ttf[nn] vs nn]
F :=
    for i ∈ nn
        for j ∈ 0 .. 2
            f[i, j] ← i^j
            f
        f
C := (transpose(F)*F)^-1*transpose(F)*m_ttn = [3.19404; -0.0250464; 3.14489e-5]
p_t(t, c0, c1, c2) := c0 + c1*t + c2*t^2
p_tc := p_t(t, c0, c1, c2) series, t, 3 → c0 + c1*t + c2*t^2 coeffs, t → [c0; c1; c2]
d^2/dt^2(p_t(t, c0, c1, c2)) → 2*c2
m_t(t, a0, w, a1) := a0*sin(w*t) + a1*cos(w*t)
m_tr(t) := cos(t) + sin(t)
m_ts := m_t(t, a0, w, a1) series, t, 3 → a1 + a0*w*t - a1*w^2/2*t^2
m_trs := m_tr(t) series, t, 3 → 1 + t - 1/2*t^2
m_trc := m_trs coeffs, t → [1; 1; -1/2]
m_tr[2] := m_trc[2]*(-1)
m_tc := m_ts coeffs, t → [a1; a0*w; -(a1*w^2)/2]
discretes := apply(m_tc, m_trc) → [a1; a0*w; a1*w^2]
balance_d := discretes - p_tc → [-c0 + a1; a0*w - c1; a1*w^2 - c2]
balance_c := m_tc - p_tc → [-c0 + a1; a0*w - c1; -a1*w^2/2 - c2]
solution_d := balance_d solve, a0, w, a1, simplify → [-(c0*c1*sqrt(c2/c0))/c2, -sqrt(c2/c0), c0; c0*c1*sqrt(c2/c0)/c2, sqrt(c2/c0), c0]
solution_c := balance_c solve, a0, w, a1, simplify → [
    sqrt(2)*c0*c1*sqrt(-c2/c0)/(2*c2), -(sqrt(2)*sqrt(-c2/c0)), c0;
    -(sqrt(2)*c0*c1*sqrt(-c2/c0))/(2*c2), sqrt(2)*sqrt(-c2/c0), c0
]
solution_d := transpose(solution_d[1, :]) → [c0*c1*sqrt(c2/c0)/c2; sqrt(c2/c0); c0]
solution_c := transpose(solution_c[1, :]) → [-(sqrt(2)*c0*c1*sqrt(-c2/c0))/(2*c2); sqrt(2)*sqrt(-c2/c0); c0]
solution_d := solution_d substitute, c0 == C[0], c1 == C[1], c2 == C[2] → [-7.76832410177; 0.00310503745901; 3.09852660115]
solution_c := solution_c substitute, c0 == C[0], c1 == C[1], c2 == C[2] → [5.49303465082i; 0.00439118608621i; 3.09852660115]
m_tts_d[nn] := m_t(nn, solution_d[0], solution_d[1], solution_d[2])
m_tts_c[nn] := m_t(nn, solution_c[0], solution_c[1], solution_c[2])
# [plot: m_tts_d[nn], m_tts_c[nn], m_ttf[nn] vs nn]
concord(m_ttf, m_tts_d) = 0.593881
lin_div(m_ttf, m_tts_d) = 1000.96
concord(m_ttf, m_tts_c) = 0.671534
lin_div(m_ttf, m_tts_c) = 768.626
# Exponent DSB testing
d := 10000
nn := 0 .. d
mu := 0
sigma := 5
add := rnorm(d + 1, mu, sigma)
m_ee(t) := 22 + 0.01*t + 0.1*e^(0.006*t)
m_ee(t) := 0.0000005*t^2
m_eef[nn] := m_ee(nn)
m_een := noise(m_eef, add)
# [plot: m_een[nn], m_eef[nn] vs nn]
F :=
    for i ∈ nn
        for j ∈ 0 .. 3
            f[i, j] ← i^j
            f
        f
C := (transpose(F)*F)^-1*transpose(F)*m_een = [-0.426528; 0.000493505; 3.79929e-7; 7.99653e-12]
p_e(t, c0, c1, c2, c3) := c0 + c1*t + c2*t^2 + c3*t^3
p_ec := p_e(t, c0, c1, c2, c3) coeffs, t → [c0; c1; c2; c3]
m_e(t, a0, a1, a2, a3) := a0 + a1*t + a2*e^(a3*t)
m_es := m_e(t, a0, a1, a2, a3) series, t, 4 → a2 + a0 + (a2*a3 + a1)*t + a2*a3^2/2*t^2 + a2*a3^3/6*t^3
m_er(t) := t + e^t
m_ec := m_es coeffs, t → [a2 + a0; a2*a3 + a1; a2*a3^2/2; a2*a3^3/6]
m_ers := m_er(t) series, t, 4 → 1 + 2*t + 1/2*t^2 + 1/6*t^3
m_erc := m_ers coeffs, t → [1; 2; 1/2; 1/6]
discretes := apply(m_ec, m_erc) → [a2 + a0; (a2*a3 + a1)/2; a2*a3^2; a2*a3^3]
balance_d := discretes - p_ec → [-c0 + a2 + a0; (a2*a3 + a1)/2 - c1; -c2 + a2*a3^2; -c3 + a2*a3^3]
balance_c := m_ec - p_ec → [-c0 + a2 + a0; -c1 + a2*a3 + a1; a2*a3^2/2 - c2; a2*a3^3/6 - c3]
solution_d := balance_d solve, a0, a1, a2, a3, simplify → [c0 - c2^3/c3^2, 2*c1 - c2^2/c3, c2^3/c3^2, c3/c2]
solution_c := balance_c solve, a0, a1, a2, a3, simplify → [c0 - 2*c2^3/(9*c3^2), c1 - 2*c2^2/(3*c3), 2*c2^3/(9*c3^2), 3*c3/c2]
solution_d := solution_d substitute, c0 == C[0], c1 == C[1], c2 == C[2], c3 == C[3] → [-858.063884296, -0.0170640599699, 857.637356002, 2.10474397289e-5]
solution_c := solution_c substitute, c0 == C[0], c1 == C[1], c2 == C[2], c3 == C[3] → [-191.012607405, -0.0115405417449, 190.586079112, 6.31423191866e-5]
solution_d := transpose(solution_d) = [-858.064; -0.0170641; 857.637; 2.10474e-5]
solution_c := transpose(solution_c) = [-191.013; -0.0115405; 190.586; 6.31423e-5]
m_ees_d[nn] := m_e(nn, solution_d[0], solution_d[1], solution_d[2], solution_d[3])
m_ees_c[nn] := m_e(nn, solution_c[0], solution_c[1], solution_c[2], solution_c[3])
# [plot: m_ees_d[nn], m_ees_c[nn], m_eef[nn] vs nn]
concord(m_eef, m_ees_d) = 0.848314
lin_div(m_eef, m_ees_d) = 55858.4
concord(m_eef, m_ees_c) = 0.999507
lin_div(m_eef, m_ees_c) = 3638.15
# Trigonometric DSB testing
d := 5000
nn := 0 .. d
mu := 0
sigma := 0.1
add := rnorm(d + 1, mu, sigma)
m_aa(t) := 0.5*atan(0.01*t)
m_aaf[nn] := m_aa(nn)
m_aan := noise(m_aaf, add)
# [plot: m_aan[nn], m_aaf[nn] vs nn]
F :=
    for i ∈ nn
        for j ∈ 0 .. 3
            f[i, j] ← i^j
            f
        f
C := (transpose(F)*F)^-1*transpose(F)*m_aan = [0.457507; 0.000383544; -1.38689e-7; 1.527e-11]
m_a(t, a, w) := a*atan(w*t)
p_a(t, c0, c1, c2, c3) := c0 + c1*t + c2*t^2 + c3*t^3
m_as := m_a(t, a, w) series, t, 4 → a*w*t - a*w^3/3*t^3
p_ac := p_a(t, c0, c1, c2, c3) coeffs, t → [c0; c1; c2; c3]
m_ar(t) := atan(t)
m_ac := m_as coeffs, t → [0; a*w; 0; -(a*w^3)/3]
m_ars := m_ar(t) series, t, 4 → t - 1/3*t^3
m_arc := m_ars coeffs, t → [0; 1; 0; -1/3]
discretes := apply(m_ac, m_arc) → [0; a*w; 0; a*w^3]
balance_d := discretes - p_ac → [-c0; a*w - c1; -c2; a*w^3 - c3]
balance_c := m_ac - p_ac → [-c0; a*w - c1; -c2; -a*w^3/3 - c3]
solution_d := balance_d solve, a, w → {
    if c0 == 0 and c2 == 0
        [c1^2*sqrt(c3/c1)/c3, sqrt(c3/c1); -(c1^2*sqrt(c3/c1))/c3, -sqrt(c3/c1)]
    else
        undefined
} assume, c0 == 0, c2 == 0 → [c1^2*sqrt(c3/c1)/c3, sqrt(c3/c1); -(c1^2*sqrt(c3/c1))/c3, -sqrt(c3/c1)]
solution_c := balance_c solve, a, w → {
    if c0 == 0 and c2 == 0
        [-(c1^2*sqrt(-(3*c3)/c1))/(3*c3), sqrt(-(3*c3)/c1); c1^2*sqrt(-(3*c3)/c1)/(3*c3), -sqrt(-(3*c3)/c1)]
    else
        undefined
} assume, c0 == 0, c2 == 0 → [
    -(sqrt(3)*c1^2*sqrt(-c3/c1))/(3*c3), sqrt(3)*sqrt(-c3/c1);
    sqrt(3)*c1^2*sqrt(-c3/c1)/(3*c3), -(sqrt(3)*sqrt(-c3/c1))
]
solution_d := transpose(solution_d[0, :]) → [c1^2*sqrt(c3/c1)/c3; sqrt(c3/c1)]
solution_c := transpose(solution_c[0, :]) → [-(sqrt(3)*c1^2*sqrt(-c3/c1))/(3*c3); sqrt(3)*sqrt(-c3/c1)]
solution_d := solution_d substitute, c1 == C[1], c3 == C[3] → [1.9567599473; 0.000201605009841]
solution_c := solution_c substitute, c1 == C[1], c3 == C[3] → [-1.12973588231i; 0.000349190120104i]
m_aas_d[nn] := m_a(nn, solution_d[0], solution_d[1])
m_aas_c[nn] := m_a(nn, solution_c[0], solution_c[1])
# [plot: m_aas_d[nn], m_aas_c[nn], m_aaf[nn] vs nn]
concord(m_aaf, m_aas_d) = 0.211368
lin_div(m_aaf, m_aas_d) = 1844.06
concord(m_aaf, m_aas_c) =  # error: This value must be a matrix of real numbers.
lin_div(m_aaf, m_aas_c) = 5310.88
# Combined BDS testing
d := 2000
nn := 0, 10 .. d
mu := 0
sigma := 3
add := rnorm(d + 1, mu, sigma)
m_nn(t) := 30 + 0.05*t + 14*sin(0.002*t) + 17.5*cos(0.01*t)
m_nnf[nn] := m_nn(nn)
m_nnn := noise(m_nnf, add)
# [plot: m_nnn[nn], m_nnf[nn] vs nn]
F :=
    for i ∈ nn
        for j ∈ 0 .. 5
            f[i, j] ← i^j
            f
        f
C := (transpose(F)*F)^-1*transpose(F)*m_nnn = [51.3236; -0.154126; 0.00063563; -7.06751e-7; 3.2101e-10; 0]
m_n(t, a0, a1, a2, a3, a4, a5) := a0 + a1*t + a2*sin(a3*t) + a4*cos(a5*t)
m_ns := m_n(t, a0, a1, a2, a3, a4, a5) series, t → a4 + a0 + (a2*a3 + a1)*t - a4*a5^2/2*t^2 - a2*a3^3/6*t^3 + a4*a5^4/24*t^4 + a2*a3^5/120*t^5
p_n(t, c0, c1, c2, c3, c4, c5) := c0 + c1*t + c2*t^2 + c3*t^3 + c4*t^4 + c5*t^5
m_nc := m_ns coeffs, t → [a4 + a0; a2*a3 + a1; -(a4*a5^2)/2; -(a2*a3^3)/6; a4*a5^4/24; a2*a3^5/120]
p_nc := p_n(t, c0, c1, c2, c3, c4, c5) coeffs, t → [c0; c1; c2; c3; c4; c5]
m_nr(t) := t + sin(t) + cos(t)
m_nrs := m_nr(t) series, t → 1 + 2*t - 1/2*t^2 - 1/6*t^3 + 1/24*t^4 + 1/120*t^5
m_nrc := m_nrs coeffs, t → [1; 2; -1/2; -1/6; 1/24; 1/120]
discretes := apply(m_nc, m_nrc) → [a4 + a0; (a2*a3 + a1)/2; a4*a5^2; a2*a3^3; a4*a5^4; a2*a3^5]
balance_d := discretes - p_nc → [-c0 + a4 + a0; (a2*a3 + a1)/2 - c1; -c2 + a4*a5^2; -c3 + a2*a3^3; -c4 + a4*a5^4; -c5 + a2*a3^5]
balance_c := m_nc - p_nc → [
    -c0 + a4 + a0;
    -c1 + a2*a3 + a1;
    -a4*a5^2/2 - c2;
    -a2*a3^3/6 - c3;
    a4*a5^4/24 - c4;
    a2*a3^5/120 - c5
]
solution_d := balance_d solve, a0, a1, a2, a3, a4, a5 → [
    (c0*c4 - c2^2)/c4, (2*c1*c5 - c3^2)/c5, -(c3^3*sqrt(c5/c3))/c5^2, -sqrt(c5/c3), c2^2/c4, -sqrt(c4/c2);
    (c0*c4 - c2^2)/c4, (2*c1*c5 - c3^2)/c5, c3^3*sqrt(c5/c3)/c5^2, sqrt(c5/c3), c2^2/c4, -sqrt(c4/c2);
    (c0*c4 - c2^2)/c4, (2*c1*c5 - c3^2)/c5, -(c3^3*sqrt(c5/c3))/c5^2, -sqrt(c5/c3), c2^2/c4, sqrt(c4/c2);
    (c0*c4 - c2^2)/c4, (2*c1*c5 - c3^2)/c5, c3^3*sqrt(c5/c3)/c5^2, sqrt(c5/c3), c2^2/c4, sqrt(c4/c2)
]
solution_c := balance_c solve, a0, a1, a2, a3, a4, a5 → [
    (6*c0*c4 - c2^2)/(6*c4), (10*c1*c5 - 3*c3^2)/(10*c5), 3*c3^3*sqrt(-(20*c5)/c3)/(200*c5^2), -sqrt(-(20*c5)/c3), c2^2/(6*c4), -sqrt(-(12*c4)/c2);
    (6*c0*c4 - c2^2)/(6*c4), (10*c1*c5 - 3*c3^2)/(10*c5), -(3*c3^3*sqrt(-(20*c5)/c3))/(200*c5^2), sqrt(-(20*c5)/c3), c2^2/(6*c4), -sqrt(-(12*c4)/c2);
    (6*c0*c4 - c2^2)/(6*c4), (10*c1*c5 - 3*c3^2)/(10*c5), 3*c3^3*sqrt(-(20*c5)/c3)/(200*c5^2), -sqrt(-(20*c5)/c3), c2^2/(6*c4), sqrt(-(12*c4)/c2);
    (6*c0*c4 - c2^2)/(6*c4), (10*c1*c5 - 3*c3^2)/(10*c5), -(3*c3^3*sqrt(-(20*c5)/c3))/(200*c5^2), sqrt(-(20*c5)/c3), c2^2/(6*c4), sqrt(-(12*c4)/c2)
]
solution_d := transpose(solution_d[0, :]) → [
    (c0*c4 - c2^2)/c4;
    (2*c1*c5 - c3^2)/c5;
    -(c3^3*sqrt(c5/c3))/c5^2;
    -sqrt(c5/c3);
    c2^2/c4;
    -sqrt(c4/c2)
]
solution_c := transpose(solution_c[0, :]) → [
    (6*c0*c4 - c2^2)/(6*c4);
    (10*c1*c5 - 3*c3^2)/(10*c5);
    3*sqrt(5)*c3^3*sqrt(-c5/c3)/(100*c5^2);
    -(2*sqrt(5)*sqrt(-c5/c3));
    c2^2/(6*c4);
    -(2*sqrt(3)*sqrt(-c4/c2))
]
solution_d := solution_d substitute, c0 == C[0], c1 == C[1], c2 == C[2], c3 == C[3], c4 == C[4], c5 == C[5] → [-1340.65999116; 10.4312573111; 39847.0593519; -0.000270846859483; 1394.84380785; -0.000713805588983]
solution_c := solution_c substitute, c0 == C[0], c1 == C[1], c2 == C[2], c3 == C[3], c4 == C[4], c5 == C[5] → [-178.290151283; 3.05713847853; -2673.02200243i; -0.00121126397859i; 232.473967975; -0.00247269509369i]
m_nns_d[nn] := m_n(nn, solution_d[0], solution_d[1], solution_d[2], solution_d[3], solution_d[4], solution_d[5])
m_nns_c[nn] := m_n(nn, solution_c[0], solution_c[1], solution_c[2], solution_c[3], solution_c[4], solution_c[5])
# [plot: m_nns_d[nn], m_nns_c[nn], m_nnf[nn] vs nn]
concord(m_nnf, m_nns_d) = 0.298369
lin_div(m_nnf, m_nns_d) = 112500
concord(m_nnf, m_nns_c) = 0.0594622
lin_div(m_nnf, m_nns_c) = 190047
pol(x, c0, c1, c2, c3) := c0 + c1*x + c2*x^2 + c3*x^3
n := 0 .. 100
pol_3(x) := pol(x, 1, -1/2, -1/4, -1/8)
# [plot: pol_3(n) vs n]
