pol(x, c0, c1, c2, c3, c4) := c0 + c1*x + c2*x^2 + c3*x^3 + c4*x^4
I(k) := if(k == 0, 1, 0)
C(k, n) := if(k == n, H^n, 0)
P(k, c0, c1, c2, c3, c4, c5) := c0*I(k) + c1*C(k, 1) + c2*C(k, 2) + c3*C(k, 3) + c4*C(k, 4) + c5*C(k, 5)
P2 := [P(0, c0, c1, c2, c3, c4, c5); P(1, c0, c1, c2, c3, c4, c5); P(2, c0, c1, c2, c3, c4, c5)] → [c0; H*c1; H^2*c2]
P3 := [
    P(0, c0, c1, c2, c3, c4, c5);
    P(1, c0, c1, c2, c3, c4, c5);
    P(2, c0, c1, c2, c3, c4, c5);
    P(3, c0, c1, c2, c3, c4, c5)
] → [c0; H*c1; H^2*c2; H^3*c3]
P5 := [
    P(0, c0, c1, c2, c3, c4, c5);
    P(1, c0, c1, c2, c3, c4, c5);
    P(2, c0, c1, c2, c3, c4, c5);
    P(3, c0, c1, c2, c3, c4, c5);
    P(4, c0, c1, c2, c3, c4, c5);
    P(5, c0, c1, c2, c3, c4, c5)
] → [c0; H*c1; H^2*c2; H^3*c3; H^4*c4; H^5*c5]
P4 := [
    P(0, c0, c1, c2, c3, c4, c5);
    P(1, c0, c1, c2, c3, c4, c5);
    P(2, c0, c1, c2, c3, c4, c5);
    P(3, c0, c1, c2, c3, c4, c5);
    P(4, c0, c1, c2, c3, c4, c5)
] → [c0; H*c1; H^2*c2; H^3*c3; H^4*c4]
f_exp(x, a0, a1, a2, a3) := a0 + a1*x + a2*e^(a3*x)
E(k, w) := (w*H)^k/k!
F(k, a0, a1, a2, a3) := a0*I(k) + a1*C(k, 1) + a2*E(k, a3)
F := [F(0, a0, a1, a2, a3); F(1, a0, a1, a2, a3); F(2, a0, a1, a2, a3); F(3, a0, a1, a2, a3)] → [a2 + a0; H*a2*a3 + H*a1; H^2*a2*a3^2/2; H^3*a2*a3^3/6]
balance := vectorize(F == P3) simplify → [a2 + a0 == c0; H*(a2*a3 + a1) == H*c1; H^2*a2*a3^2/2 == H^2*c2; H^3*a2*a3^3/6 == H^3*c3]
solution := balance solve, a0, a1, a2, a3 → [(9*c0*c3^2 - 2*c2^3)/(9*c3^2), (3*c1*c3 - 2*c2^2)/(3*c3), 2*c2^3/(9*c3^2), 3*c3/c2]
transpose(solution) simplify → [c0 - 2*c2^3/(9*c3^2); c1 - 2*c2^2/(3*c3); 2*c2^3/(9*c3^2); 3*c3/c2]
f_cos(x, a0, a1, a2, a3, a4) := a0 + a1*x + a2*x^3 + a3*cos(a4*x)
Cos(k, w) := (w*H)^k/k!*cos(π*k/2)
F(k, a0, a1, a2, a3, a4) := a0*C(k, 1) + a1*C(k, 3) + a2*Cos(k, a3)
F := [
    F(0, a0, a1, a2, a3, a4);
    F(1, a0, a1, a2, a3, a4);
    F(2, a0, a1, a2, a3, a4);
    F(3, a0, a1, a2, a3, a4)
] → [a2; H*a0; -(H^2*a2*a3^2)/2; H^3*a1]
balance := vectorize(F == P3) → [a2 == c0; H*a0 == H*c1; -(H^2*a2*a3^2)/2 == H^2*c2; H^3*a1 == H^3*c3]
solution := balance solve, a0, a1, a2, a3 → [c1, c3, c0, sqrt(-(2*c2)/c0); c1, c3, c0, -sqrt(-(2*c2)/c0)]
transpose(solution) simplify → [c1, c1; c3, c3; c0, c0; sqrt(2)*sqrt(-c2/c0), -(sqrt(2)*sqrt(-c2/c0))]
f_sin(x, a0, a1, a2, a3) := a0 + a1*x^2 + a2*sin(a3*x)
Sin(k, w) := (w*H)^k/k!*sin(π*k/2)
F(k, a0, a1, a2, a3) := a0*I(k) + a1*C(k, 2) + a2*Sin(k, a3)
F := [F(0, a0, a1, a2, a3); F(1, a0, a1, a2, a3); F(2, a0, a1, a2, a3); F(3, a0, a1, a2, a3)] → [a0; H*a2*a3; H^2*a1; -(H^3*a2*a3^3)/6]
balance := vectorize(F == P3) → [a0 == c0; H*a2*a3 == H*c1; H^2*a1 == H^2*c2; -(H^3*a2*a3^3)/6 == H^3*c3]
solution := balance solve, a0, a1, a2, a3 → [
    c0, c2, -(c1^2*sqrt(-(6*c3)/c1))/(6*c3), sqrt(-(6*c3)/c1);
    c0, c2, c1^2*sqrt(-(6*c3)/c1)/(6*c3), -sqrt(-(6*c3)/c1)
]
transpose(solution) simplify → [
    c0, c0;
    c2, c2;
    -(sqrt(6)*c1^2*sqrt(-c3/c1))/(6*c3), sqrt(6)*c1^2*sqrt(-c3/c1)/(6*c3);
    sqrt(6)*sqrt(-c3/c1), -(sqrt(6)*sqrt(-c3/c1))
]
f(x, a0, a1, a2, a3, a4) := a0 + a1*x^2 + a2*tan(a3*x)
tan(x) == sin(x)/cos(x)
Tan(k, w) := (Sin(k, w) - sum(Tan(k - l, w)*Cos(l, w), l = 1 .. k))/Cos(0, w)
Tan_0(w) := Sin(0, w)/Cos(0, w) → 0
Tan_1(w) := (Sin(1, w) - T_0(w)*Cos(1, w))/Cos(0, w) → H*w
Tan_2(w) := (Sin(2, w) - (T_1(w)*Cos(1, w) + Tan_0(w)*Cos(2, w)))/Cos(0, w) → 0
Tan_3(w) := (Sin(3, w) - (Tan_2(w)*Cos(1, w) + Tan_1(w)*Cos(2, w) + Tan_0(w)*Cos(3, w)))/Cos(0, w) → H^3*w^3/3
Tan_4(w) := (Sin(4, w) - (Tan_3(w)*Cos(1, w) + Tan_2(w)*Cos(2, w) + Tan_1(w)*Cos(3, w) + Tan_0(w)*Cos(4, w)))/Cos(0, w) → 0
Tan_5(w) := (Sin(5, w) - (Tan_4(w)*Cos(1, w) + Tan_3(w)*Cos(2, w) + Tan_2(w)*Cos(3, w) + Tan_1(w)*Cos(4, w) + Tan_0(w)*Cos(5, w)))/Cos(0, w) → 2*H^5*w^5/15
Tan_6(w) := (Sin(6, w) - (Tan_5(w)*Cos(1, w) + Tan_4(w)*Cos(2, w) + Tan_3(w)*Cos(3, w) + Tan_2(w)*Cos(4, w) + Tan_1(w)*Cos(5, w) + Tan_0(w)*Cos(6, w)))/Cos(0, w) → 0
Tan_7(w) := (Sin(7, w) - (Tan_6(w)*Cos(1, w) + Tan_5(w)*Cos(2, w) + Tan_4(w)*Cos(3, w) + Tan_3(w)*Cos(4, w) + Tan_2(w)*Cos(5, w) + Tan_1(w)*Cos(6, w) + Tan_0(w)*Cos(7, w)))/Cos(0, w) → 17*H^7*w^7/315
Tan := [Tan_0(w); Tan_1(w); Tan_2(w); Tan_3(w); Tan_4(w); Tan_5(w); Tan_6(w); Tan_7(w)] → [0; H*w; 0; H^3*w^3/3; 0; 2*H^5*w^5/15; 0; 17*H^7*w^7/315]
F_0 := a0 + 0 + a2*Tan_0(a3) → a0
F_1 := 0 + 0 + a2*Tan_1(a3) simplify → H*a2*a3
F_2 := 0 + a1*H^2 + a2*Tan_2(a3) simplify → H^2*a1
F_3 := 0 + 0 + a2*Tan_3(a3) simplify → H^3*a2*a3^3/3
F := [F_0; F_1; F_2; F_3] → [a0; H*a2*a3; H^2*a1; H^3*a2*a3^3/3]
balance := vectorize(F == P3) → [a0 == c0; H*a2*a3 == H*c1; H^2*a1 == H^2*c2; H^3*a2*a3^3/3 == H^3*c3]
solution := balance solve, a0, a1, a2, a3 → [
    c0, c2, c1^2*sqrt(3*c3/c1)/(3*c3), sqrt(3*c3/c1);
    c0, c2, -(c1^2*sqrt(3*c3/c1))/(3*c3), -sqrt(3*c3/c1)
]
transpose(solution) simplify → [
    c0, c0;
    c2, c2;
    sqrt(3)*c1^2*sqrt(c3/c1)/(3*c3), -(sqrt(3)*c1^2*sqrt(c3/c1))/(3*c3);
    sqrt(3)*sqrt(c3/c1), -(sqrt(3)*sqrt(c3/c1))
]
f_tran(x, a0, w, a1) := a0*cos(w*x) + a1*sin(w*x)
a0 == c0
F(k, a0, w, a1) := a0*Sin(k, w) + a1*Cos(k, w)
a1 == c1
Fx := [F(0, a0, w, a1); F(1, a0, w, a1); F(2, a0, w, a1); F(3, a0, w, a1); F(4, a0, w, a1)] → [a1; H*a0*w; -(H^2*a1*w^2)/2; -(H^3*a0*w^3)/6; H^4*a1*w^4/24]
a0 + a1*t == y
F := [F(0, a0, w, a1); F(1, a0, w, a1); F(2, a0, w, a1)] → [a1; H*a0*w; -(H^2*a1*w^2)/2]
balance := vectorize(F == P2) → [a1 == c0; H*a0*w == H*c1; -(H^2*a1*w^2)/2 == H^2*c2]
solution := balance solve, a0, w, a1 → [
    c0*c1*sqrt(-(2*c2)/c0)/(2*c2), -sqrt(-(2*c2)/c0), c0;
    -(c0*c1*sqrt(-(2*c2)/c0))/(2*c2), sqrt(-(2*c2)/c0), c0
]
transpose(solution) simplify → [
    sqrt(2)*c0*c1*sqrt(-c2/c0)/(2*c2), -(sqrt(2)*c0*c1*sqrt(-c2/c0))/(2*c2);
    -(sqrt(2)*sqrt(-c2/c0)), sqrt(2)*sqrt(-c2/c0);
    c0, c0
]
f_comb(x, a0, a1, a2, a3, a4, a5) := a0 + a1*x + a2*sin(a3*x) + a4*cos(a5*x)
F(k, a0, a1, a2, a3, a4, a5) := a0*I(k) + a1*C(k, 1) + a2*Sin(k, a3) + a4*Cos(k, a5)
F := [
    F(0, a0, a1, a2, a3, a4, a5);
    F(1, a0, a1, a2, a3, a4, a5);
    F(2, a0, a1, a2, a3, a4, a5);
    F(3, a0, a1, a2, a3, a4, a5);
    F(4, a0, a1, a2, a3, a4, a5);
    F(5, a0, a1, a2, a3, a4, a5)
] → [a4 + a0; H*a2*a3 + H*a1; -(H^2*a4*a5^2)/2; -(H^3*a2*a3^3)/6; H^4*a4*a5^4/24; H^5*a2*a3^5/120]
balance := vectorize(F == P5) → [
    a4 + a0 == c0;
    H*a2*a3 + H*a1 == H*c1;
    -(H^2*a4*a5^2)/2 == H^2*c2;
    -(H^3*a2*a3^3)/6 == H^3*c3;
    H^4*a4*a5^4/24 == H^4*c4;
    H^5*a2*a3^5/120 == H^5*c5
]
solution := balance solve, a0, a1, a2, a3, a4, a5 → [
    (6*c0*c4 - c2^2)/(6*c4), (10*c1*c5 - 3*c3^2)/(10*c5), 3*c3^3*sqrt(-(20*c5)/c3)/(200*c5^2), -sqrt(-(20*c5)/c3), c2^2/(6*c4), -sqrt(-(12*c4)/c2);
    (6*c0*c4 - c2^2)/(6*c4), (10*c1*c5 - 3*c3^2)/(10*c5), -(3*c3^3*sqrt(-(20*c5)/c3))/(200*c5^2), sqrt(-(20*c5)/c3), c2^2/(6*c4), -sqrt(-(12*c4)/c2);
    (6*c0*c4 - c2^2)/(6*c4), (10*c1*c5 - 3*c3^2)/(10*c5), 3*c3^3*sqrt(-(20*c5)/c3)/(200*c5^2), -sqrt(-(20*c5)/c3), c2^2/(6*c4), sqrt(-(12*c4)/c2);
    (6*c0*c4 - c2^2)/(6*c4), (10*c1*c5 - 3*c3^2)/(10*c5), -(3*c3^3*sqrt(-(20*c5)/c3))/(200*c5^2), sqrt(-(20*c5)/c3), c2^2/(6*c4), sqrt(-(12*c4)/c2)
]
transpose(solution) simplify → [
    c0 - c2^2/(6*c4), c0 - c2^2/(6*c4), c0 - c2^2/(6*c4), c0 - c2^2/(6*c4);
    c1 - 3*c3^2/(10*c5), c1 - 3*c3^2/(10*c5), c1 - 3*c3^2/(10*c5), c1 - 3*c3^2/(10*c5);
    3*sqrt(5)*c3^3*sqrt(-c5/c3)/(100*c5^2), -(3*sqrt(5)*c3^3*sqrt(-c5/c3))/(100*c5^2), 3*sqrt(5)*c3^3*sqrt(-c5/c3)/(100*c5^2), -(3*sqrt(5)*c3^3*sqrt(-c5/c3))/(100*c5^2);
    -(2*sqrt(5)*sqrt(-c5/c3)), 2*sqrt(5)*sqrt(-c5/c3), -(2*sqrt(5)*sqrt(-c5/c3)), 2*sqrt(5)*sqrt(-c5/c3);
    c2^2/(6*c4), c2^2/(6*c4), c2^2/(6*c4), c2^2/(6*c4);
    -(2*sqrt(3)*sqrt(-c4/c2)), -(2*sqrt(3)*sqrt(-c4/c2)), 2*sqrt(3)*sqrt(-c4/c2), 2*sqrt(3)*sqrt(-c4/c2)
]
